<?xml version="1.0"?>
<?xml-stylesheet type="text/xsl" href="http://jsbsim.sourceforge.net/JSBSim.xsl"?>

<!-- Copyright (c) 2019 Joshua Davidson (it0uchpods) -->

<?xml-stylesheet href="JSBSim.xsl" type="application/xml"?>
<fdm_config name="IDG-PA28X" version="2.0" release="BETA"
xmlns:xsi="http://www.w3.org/2001/XMLSchema-instance"
xsi:noNamespaceSchemaLocation="http://jsbsim.sourceforge.net/JSBSim.xsd">

	<fileheader>
		<author>Joshua Davidson (it0uchpods)</author>
		<version>Pre V1.0</version>
		<description>PA28-161 Warrior II FDE</description>
	</fileheader>

	<metrics file="Systems/pa28-metrics"/>
	<mass_balance file="Systems/pa28-mass-balance"/>
	<ground_reactions file="Systems/pa28-ground-reactions"/>

	<propulsion>
		<engine file="lycoming-O-360-A4A">
			<location unit="M">
				<x> -3.15117 </x>
				<y> 0 </y>
				<z> -0.04522 </z>
			</location>
			<orient unit="DEG">
				<roll>0.00</roll>
				<pitch>0.00</pitch>
				<yaw>0.00</yaw>
			</orient>
			<feed>2</feed>
			<thruster file="fixed-pitch-2-blade">
				<location unit="M">
					<x> -3.15117 </x>
					<y> 0 </y>
					<z> -0.04522 </z>
				</location>
				<orient unit="DEG">
					<roll>0.00</roll>
					<pitch>0.00</pitch>
					<yaw>0.00</yaw>
				</orient>
				<sense>1</sense>
				<p_factor>5</p_factor>
			</thruster>
		</engine>

		<tank type="FUEL">    <!-- Left Wing Tank -->
			<location unit="M">
				<x> -1.10417 </x>
				<y> -0.99772 </y>
				<z> -0.3533 </z>
			</location>
			<radius unit="M">13.3</radius>
			<capacity unit="LBS">168.0</capacity>
			<contents unit="LBS">119.0</contents>
			<type>AVGAS</type>
			<priority>1</priority>
		</tank>
		<tank type="FUEL">    <!-- Right Wing Tank -->
			<location unit="M">
				<x> -1.10417 </x>
				<y> 0.99772 </y>
				<z> -0.3533 </z>
			</location>
			<radius unit="M">13.3</radius>
			<capacity unit="LBS">168.0</capacity>
			<contents unit="LBS">119.0</contents>
			<type>AVGAS</type>
			<priority>1</priority>
		</tank>
		<tank type="FUEL">    <!-- Engine Pipes -->
			<location unit="M">
				<x> -1.10417 </x>
				<y> 0 </y>
				<z> 0.41522 </z>
			</location>
			<capacity unit="LBS">0.01</capacity>
			<contents unit="LBS">0.00</contents>
			<type>AVGAS</type>
			<priority>1</priority>
		</tank>
	</propulsion>

	<system file="pa28-libraries"/>
	<system file="pa28-crash-stress"/>
	<system file="pa28-engine"/>
	<system file="pa28-fuel"/>
	<system file="pa28-fcs"/>
	<system file="pa28-cockpit"/>

	<flight_control name="none"/>

	<aerodynamics file="Systems/pa28-aerodynamics.xml"/>

</fdm_config>
