<!-- PA28-161 Aerodynamics -->

<!-- Copyright (c) 2019 Joshua Davidson (it0uchpods) -->

<aerodynamics>

	<function name="aero/function/kCDge">
		<description>Change in drag due to ground effect</description>
		<product>
			<table>
				<independentVar>aero/h_b-mac-ft</independentVar>
				<tableData>
					0.0000  0.4800
					0.1000  0.5150
					0.1500  0.6290
					0.2000  0.7090
					0.3000  0.8150
					0.4000  0.8820
					0.5000  0.9280
					0.6000  0.9620
					0.7000  0.9880
					0.8000  1.0000
					0.9000  1.0000
					1.0000  1.0000
					1.1000  1.0000
				  </tableData>
			</table>
		</product>
	</function>

	<function name="aero/function/kCLge">
		<description>Change in lift due to ground effect</description>
		<product>
			<table>
				<independentVar>aero/h_b-mac-ft</independentVar>
				<tableData>
					0.0000  1.2030
					0.1000  1.1270
					0.1500  1.0900
					0.2000  1.0730
					0.3000  1.0460
					0.4000  1.0280
					0.5000  1.0190
					0.6000  1.0130
					0.7000  1.0080
					0.8000  1.0060
					0.9000  1.0030
					1.0000  1.0020
					1.1000  1.0000
				  </tableData>
			</table>
		</product>
	</function>

	<function name="aero/function/qbar-propwash-psf">
		<description>Q bar due to the propeller induced velocity </description>
		<product>
			<property>propulsion/engine[0]/prop-induced-velocity_fps</property>
			<property>propulsion/engine[0]/prop-induced-velocity_fps</property>
			<property>atmosphere/rho-slugs_ft3</property>
			<value>0.5</value>
		</product>
	</function>

	<axis name="LIFT">

		<function name="aero/force/Lift_propwash">
			<description>Delta lift due to propeller induced velocity</description>
			<product>
				<property>propulsion/engine[0]/thrust-coefficient</property>
				<property>aero/qbar-psf</property>
				<property>metrics/Sw-sqft</property>
				<table>
					<independentVar lookup="row">aero/alpha-rad</independentVar>
					<independentVar lookup="column">fcs/flap-pos-deg</independentVar>
					<tableData>
						       0      60
						-0.24  0.000  0.000
						 0.00  0.064  0.170
						 0.27  0.291  0.775
						 0.53  0.000  0.000
					</tableData>
				</table>
			</product>
		</function>

		<function name="aero/force/Lift_alpha">
			<description>Lift due to alpha</description>
			<product>
				<property>aero/qbar-psf</property>
				<property>metrics/Sw-sqft</property>
				<property>aero/function/kCLge</property>
				<value>1.0973647</value> <!-- Tuning factor -->
				<table>
					<independentVar lookup="row">aero/alpha-rad</independentVar>
					<independentVar lookup="column">aero/stall-hyst-norm</independentVar>
					<tableData>
						       0     1
						-0.09 -0.05 -0.05
						 0.00  0.37  0.37
						 0.09  0.91  0.91
						 0.10  1.03  0.98
						 0.12  1.12  0.99
						 0.14  1.22  1.01
						 0.16  1.28  1.02
						 0.17  1.33  1.03
						 0.19  1.39  1.05
						 0.21  1.45  1.06
						 0.24  1.55  1.08
						 0.26  1.64  1.10
						 0.28  1.67  1.12
						 0.30  1.63  1.15
						 0.32  1.58  1.19
						 0.34  1.50  1.25
						 0.36  1.35  1.35
						 0.52  1.47  1.47
						 0.70  1.55  1.65
						 0.87  1.57  1.47
						 1.05  1.27  1.17
						 1.57  0.05  0.05
					</tableData>
				</table>
				<property>crash-stress/wing-factor</property> <!-- Crash and Stress -->
			</product>
		</function>

		<function name="aero/force/Lift_pitch_rate">
			<description>Lift due to pitch rate</description>
			<product>
				<property>aero/qbar-psf</property>
				<property>metrics/Sw-sqft</property>
				<property>velocities/q-aero-rad_sec</property>
				<property>aero/ci2vel</property>
				<value>3.4712</value>
				<property>crash-stress/wing-factor</property> <!-- Crash and Stress -->
			</product>
		</function>

		<function name="aero/force/Lift_alpha_rate">
			<description>Lift due to alpha rate</description>
			<product>
				<property>aero/qbar-psf</property>
				<property>metrics/Sw-sqft</property>
				<property>aero/alphadot-rad_sec</property>
				<property>aero/ci2vel</property>
				<value>1.2057</value>
				<property>crash-stress/wing-factor</property> <!-- Crash and Stress -->
			</product>
		</function>

		<function name="aero/force/Lift_elevator">
			<description>Lift due to Elevator Deflection</description>
			<product>
				<property>aero/qbar-psf</property>
				<property>metrics/Sw-sqft</property>
				<toradians><property>fcs/elevator-deg</property></toradians>
				<value>0.3401</value>
				<property>crash-stress/htail-factor</property> <!-- Crash and Stress -->
			</product>
		</function>

		<function name="aero/force/Lift_flap">
			<description>Delta Lift due to flaps</description>
			<product>
				<property>aero/qbar-psf</property>
				<property>metrics/Sw-sqft</property>
				<property>aero/function/kCLge</property>
				<property>fcs/flap-pos-deg</property>
				<value>0.00574</value>
				<property>crash-stress/wing-factor</property> <!-- Crash and Stress -->
			</product>
		</function>

	</axis>

	<axis name="DRAG">

		<function name="aero/force/Drag_minimum">
			<description>Minimum drag</description>
			<product>
				<property>aero/qbar-psf</property>
				<property>metrics/Sw-sqft</property>
				<property>aero/function/kCDge</property>
				<value>0.037521</value>
			</product>
		</function>

		<function name="aero/force/Drag_alpha">
			<description>Drag due to alpha</description>
			<product>
				<property>aero/qbar-psf</property>
				<property>metrics/Sw-sqft</property>
				<property>aero/function/kCDge</property>
				<value>0.5724565</value> <!-- Tuning factor -->
				<table>
					<independentVar lookup="row">aero/alpha-rad</independentVar>
					<independentVar lookup="column">fcs/flap-pos-deg</independentVar>
					<tableData>
						         0       10      20      40
						-0.0873  0.0041  0.0000  0.0005  0.0008
						-0.0698  0.0013  0.0004  0.0025  0.0036
						-0.0524  0.0001  0.0023  0.0059  0.0078
						-0.0349  0.0003  0.0057  0.0108  0.0135
						-0.0175  0.0020  0.0105  0.0172  0.0207
						 0.0000  0.0052  0.0168  0.0251  0.0295
						 0.0175  0.0099  0.0248  0.0346  0.0398
						 0.0349  0.0162  0.0342  0.0457  0.0518
						 0.0524  0.0240  0.0452  0.0583  0.0652
						 0.0698  0.0334  0.0577  0.0724  0.0802
						 0.0873  0.0442  0.0718  0.0881  0.0968
						 0.1047  0.0566  0.0874  0.1053  0.1148
						 0.1222  0.0706  0.1045  0.1240  0.1343
						 0.1396  0.0860  0.1232  0.1442  0.1554
						 0.1571  0.0962  0.1353  0.1573  0.1690
						 0.1745  0.1069  0.1479  0.1708  0.1830
						 0.1920  0.1180  0.1610  0.1849  0.1975
						 0.2094  0.1298  0.1746  0.1995  0.2126
						 0.2269  0.1424  0.1892  0.2151  0.2286
						 0.2443  0.1565  0.2054  0.2323  0.2464
						 0.3491  0.2537  0.3298  0.3755  0.3983
						 0.5236  0.4500  0.5850  0.6660  0.7065
						 0.6981  0.7000  0.9100  1.0360  1.0990
						 0.8727  1.0000  1.3000  1.4800  1.5700
						 1.0472  1.3500  1.7550  1.9980  2.1195
						 1.2217  1.5000  1.9500  2.2200  2.3550
						 1.3963  1.5700  2.0410  2.3236  2.4649
						 1.5710  1.6000  2.0800  2.3680  2.5120
					  </tableData>
				</table>
				<property>crash-stress/wing-factor</property> <!-- Crash and Stress -->
			</product>
		</function>

		<function name="aero/force/Drag_induced">
			<description>Induced drag</description>
			<product>
				<property>aero/qbar-psf</property>
				<property>metrics/Sw-sqft</property>
				<property>aero/cl-squared</property>
				<value>0.002442</value>
			</product>
		</function>

		<function name="aero/force/Drag_beta">
			<description>Drag due to sideslip</description>
			<product>
				<property>aero/qbar-psf</property>
				<property>metrics/Sw-sqft</property>
				<property>aero/mag-beta-rad</property>
				<value>0.2139</value>
			</product>
		</function>

		<function name="aero/force/Drag_elevator">
			<description>Drag due to Elevator Deflection</description>
			<product>
				<property>aero/qbar-psf</property>
				<property>metrics/Sw-sqft</property>
				<abs><toradians><property>fcs/elevator-deg</property></toradians></abs>
				<value>0.00456</value>
				<property>crash-stress/htail-factor</property> <!-- Crash and Stress -->
			</product>
		</function>

		<function name="aero/force/Drag_door">
			<description>Drag due to main door</description>
			<product>
				<property>aero/qbar-psf</property>
				<property>metrics/Sw-sqft</property>
				<table>
					<independentVar lookup="row">extra/door-main-norm</independentVar>
					<tableData> <!-- To cancel out the slight offset from 0 due to the lag_filter -->
						0.00  0.0000
						0.01  0.0000
						1.00  0.0019
					</tableData>
				</table>
			</product>
		</function>

	</axis>

	<axis name="SIDE">

		<function name="aero/force/Side_beta">
			<description>Side force due to beta</description>
			<product>
				<property>aero/qbar-psf</property>
				<property>metrics/Sw-sqft</property>
				<table>
					<independentVar lookup="row">aero/beta-rad</independentVar>
					<independentVar lookup="column">fcs/flap-pos-deg</independentVar>
					<tableData>
								0      40
						-0.349  0.137  0.106
						 0.000  0.000  0.000
						 0.349 -0.137 -0.106
					  </tableData>
				</table>
			</product>
		</function>

		<function name="aero/force/Side_roll_rate">
			<description>Side force due to roll rate</description>
			<product>
				<property>aero/qbar-psf</property>
				<property>metrics/Sw-sqft</property>
				<property>aero/bi2vel</property>
				<property>velocities/p-aero-rad_sec</property>
				<table>
					<independentVar lookup="row">aero/Re</independentVar>
					<tableData>
						3221764  0.2763
						3543940  0.0243
						4832646  0.0108
						6440811  0.0061
					</tableData>
				</table>
			</product>
		</function>

		<function name="aero/force/Side_yaw_rate">
			<description>Side force due to yaw rate</description>
			<product>
				<property>aero/qbar-psf</property>
				<property>metrics/Sw-sqft</property>
				<property>aero/bi2vel</property>
				<property>velocities/r-aero-rad_sec</property>
				<value>0.0830</value>
			</product>
		</function>

		<function name="aero/force/Side_rudder">
			<description>Side force due to rudder</description>
			<product>
				<property>aero/qbar-psf</property>
				<property>metrics/Sw-sqft</property>
				<toradians><property>fcs/rudder-deg</property></toradians>
				<value>0.0260</value>
				<property>crash-stress/vtail-factor</property> <!-- Crash and Stress -->
			</product>
		</function>

	</axis>

	<axis name="ROLL">

		<function name="aero/moment/Roll_beta">
			<description>Roll moment due to beta</description>
			<product>
				<property>aero/qbar-psf</property>
				<property>metrics/Sw-sqft</property>
				<property>metrics/bw-ft</property>
				<property>aero/beta-rad</property>
				<value>-0.075</value>
				<property>crash-stress/wing-factor</property> <!-- Crash and Stress -->
			</product>
		</function>

		<function name="aero/moment/Roll_damp">
			<description>Roll moment due to roll rate</description>
			<product>
				<property>aero/qbar-psf</property>
				<property>metrics/Sw-sqft</property>
				<property>metrics/bw-ft</property>
				<property>aero/bi2vel</property>
				<property>velocities/p-aero-rad_sec</property>
				<value>-0.71</value>
				<property>crash-stress/wing-factor</property> <!-- Crash and Stress -->
			</product>
		</function>

		<function name="aero/moment/Roll_yaw">
			<description>Roll moment due to yaw rate</description>
			<product>
				<property>aero/qbar-psf</property>
				<property>metrics/Sw-sqft</property>
				<property>metrics/bw-ft</property>
				<property>aero/bi2vel</property>
				<property>velocities/r-aero-rad_sec</property>
				<table>
					<independentVar lookup="row">fcs/flap-pos-deg</independentVar>
					<tableData>
						 0  0.0025
						40  0.0050
					</tableData>
				</table>
			</product>
		</function>

		<function name="aero/moment/Roll_left_aileron">
			<description>Roll moment due to left aileron</description>
			<product>
				<property>aero/qbar-psf</property>
				<property>metrics/Sw-sqft</property>
				<property>metrics/bw-ft</property>
				<toradians><property>fcs/aileron-left-deg</property></toradians>
				<value>0.1561</value>
				<table>
					<independentVar lookup="row">aero/alpha-rad</independentVar>
					<independentVar lookup="column">aero/stall-hyst-norm</independentVar>
					<tableData>
						       0.0   1.0
						0.279  1.00  0.30
						0.297  0.30  0.30
						0.349 -0.15 -0.15
					</tableData>
				</table>
				<property>crash-stress/left-wing-factor</property> <!-- Crash and Stress -->
			</product>
		</function>

		<function name="aero/moment/Roll_right_aileron">
			<description>Roll moment due to right aileron</description>
			<product>
				<property>aero/qbar-psf</property>
				<property>metrics/Sw-sqft</property>
				<property>metrics/bw-ft</property>
				<toradians><property>fcs/aileron-right-deg</property></toradians>
				<value>-0.1561</value>
				<table>
					<independentVar lookup="row">aero/alpha-rad</independentVar>
					<independentVar lookup="column">aero/stall-hyst-norm</independentVar>
					<tableData>
						       0.0   1.0
						0.279  1.00  0.30
						0.297  0.30  0.30
						0.349 -0.15 -0.15
					</tableData>
				</table>
				<property>crash-stress/right-wing-factor</property> <!-- Crash and Stress -->
			</product>
		</function>

		<function name="aero/moment/Roll_rudder">
			<description>Roll moment due to rudder</description>
			<product>
				<property>aero/qbar-psf</property>
				<property>metrics/Sw-sqft</property>
				<property>metrics/bw-ft</property>
				<toradians><property>fcs/rudder-deg</property></toradians>
				<value>0.05984</value>
				<property>crash-stress/vtail-factor</property> <!-- Crash and Stress -->
			</product>
		</function>

		<function name="aero/moment/Roll_wing_imbalance">
			<description>Roll moment due to wing imbalance</description>
			<product>
				<property>aero/qbar-psf</property>
				<property>metrics/Sw-sqft</property>
				<property>metrics/bw-ft</property>
				<value>-0.45712</value>
				<property>crash-stress/wing-diff-factor</property> <!-- Crash and Stress -->
			</product>
		</function>

	</axis>

	<axis name="PITCH">

		<function name="aero/moment/Pitch_zero">
			<description>Pitch moment at zero alpha</description>
			<product>
				<property>aero/qbar-psf</property>
				<property>metrics/Sw-sqft</property>
				<property>metrics/cbarw-ft</property>
				<value>0.0254</value>
			</product>
		</function>

		<function name="aero/moment/Pitch_alpha">
			<description>Pitch moment due to alpha</description>
			<product>
				<property>aero/qbar-psf</property>
				<property>metrics/Sw-sqft</property>
				<property>metrics/cbarw-ft</property>
				<property>aero/alpha-rad</property>
				<value>-0.7314</value>
				<property>crash-stress/wing-factor</property> <!-- Crash and Stress -->
			</product>
		</function>

		<function name="aero/moment/Pitch_elevator">
			<description>Pitch moment due to elevator</description>
			<product>
				<property>aero/qbar-psf</property>
				<property>metrics/Sw-sqft</property>
				<property>metrics/cbarw-ft</property>
				<toradians><property>fcs/elevator-deg</property></toradians>
				<value>-1.7329</value>
				<table>
					<independentVar lookup="row">aero/alpha-rad</independentVar>
					<independentVar lookup="column">fcs/elevator-deg</independentVar>
					<tableData>
						      -12   0    12
						0.314  1.0  1.0  1.0
						0.436  0.6  0.7  0.9
						0.610  0.3  0.4  0.8
						0.785  0.2  0.3  0.7
						0.959  0.1  0.1  0.6
						1.134  0.1  0.1  0.5
						1.570  0.1  0.1  0.4
					</tableData>
				</table>
				<property>crash-stress/htail-factor</property> <!-- Crash and Stress -->
			</product>
		</function>

		<function name="aero/moment/Pitch_damp">
			<description>Pitch moment due to pitch rate</description>
			<product>
				<property>aero/qbar-psf</property>
				<property>metrics/Sw-sqft</property>
				<property>metrics/cbarw-ft</property>
				<property>aero/ci2vel</property>
				<property>velocities/q-aero-rad_sec</property>
				<value>-22.6</value>
				<property>crash-stress/htail-factor</property> <!-- Crash and Stress -->
			</product>
		</function>

		<function name="aero/moment/Pitch_alphadot">
			<description>Pitch moment due to alpha rate</description>
			<product>
				<property>aero/qbar-psf</property>
				<property>metrics/Sw-sqft</property>
				<property>metrics/cbarw-ft</property>
				<property>aero/ci2vel</property>
				<property>aero/alphadot-rad_sec</property>
				<value>-6.2138</value>
				<property>crash-stress/wing-factor</property> <!-- Crash and Stress -->
			</product>
		</function>

	</axis>

	<axis name="YAW">

		<function name="aero/moment/Yaw_beta">
			<description>Yaw moment due to beta</description>
			<product>
				<property>aero/qbar-psf</property>
				<property>metrics/Sw-sqft</property>
				<property>metrics/bw-ft</property>
				<table>
					<independentVar>aero/beta-rad</independentVar>
					<tableData>
						-0.349 -0.0205
						 0.000  0.0000
						 0.349  0.0205
					</tableData>
				</table>
			</product>
		</function>

		<function name="aero/moment/Yaw_damp">
			<description>Yaw moment due to yaw rate</description>
			<product>
				<property>aero/qbar-psf</property>
				<property>metrics/Sw-sqft</property>
				<property>metrics/bw-ft</property>
				<property>aero/bi2vel</property>
				<property>velocities/r-aero-rad_sec</property>
				<value>-0.23</value>
				<property>crash-stress/vtail-factor</property> <!-- Crash and Stress -->
			</product>
		</function>

		<function name="aero/moment/Yaw_rudder">
			<description>Yaw moment due to rudder</description>
			<product>
				<property>aero/qbar-psf</property>
				<property>metrics/Sw-sqft</property>
				<property>metrics/bw-ft</property>
				<toradians><property>fcs/rudder-deg</property></toradians>
				<value>0.03755</value>
				<property>crash-stress/vtail-factor</property> <!-- Crash and Stress -->
			</product>
		</function>

		<function name="aero/moment/Yaw_left_aileron">
			<description>Yaw moment due to left aileron (adverse)</description>
			<product>
				<property>aero/qbar-psf</property>
				<property>metrics/Sw-sqft</property>
				<property>metrics/bw-ft</property>
				<toradians><property>fcs/aileron-left-deg</property></toradians>
				<value>0.4285</value>
				<table>
					<independentVar lookup="row">aero/alpha-rad</independentVar>
					<independentVar lookup="column">aero/beta-rad</independentVar>
					<tableData>
						      -0.35    0.00    0.35
						0.000 -0.0010 -0.0015 -0.0010
						0.144 -0.0020 -0.0025 -0.0020
					</tableData>
				</table>
				<property>crash-stress/left-wing-factor</property> <!-- Crash and Stress -->
			</product>
		</function>

		<function name="aero/moment/Yaw_right_aileron">
			<description>Yaw moment due to right aileron (adverse)</description>
			<product>
				<property>aero/qbar-psf</property>
				<property>metrics/Sw-sqft</property>
				<property>metrics/bw-ft</property>
				<toradians><property>fcs/aileron-right-deg</property></toradians>
				<value>-0.4285</value>
				<table>
					<independentVar lookup="row">aero/alpha-rad</independentVar>
					<independentVar lookup="column">aero/beta-rad</independentVar>
					<tableData>
						      -0.35    0.00    0.35
						0.000 -0.0010 -0.0015 -0.0010
						0.144 -0.0020 -0.0025 -0.0020
					</tableData>
				</table>
				<property>crash-stress/right-wing-factor</property> <!-- Crash and Stress -->
			</product>
		</function>

		<function name="aero/moment/Yaw_prop">
			<description>Yaw moment due to spiraling propwash</description>
			<product>
				<property>aero/function/qbar-propwash-psf</property>
				<property>metrics/Sw-sqft</property>
				<property>metrics/bw-ft</property>
				<value>-0.05</value>
			</product>
		</function>

		<function name="aero/moment/Yaw_spin">
			<description>Yaw moment due to flat spin</description>
			<product>
				<property>aero/qbar-psf</property>
				<property>metrics/Sw-sqft</property>
				<property>metrics/bw-ft</property>
				<property>aero/bi2vel</property>
				<table>
					<independentVar lookup="row">velocities/r-aero-rad_sec</independentVar>
					<independentVar lookup="column">aero/alpha-rad</independentVar>
					<tableData>
						    0.29  0.41
						-5  0.00  0.00
						-3  0.00 -0.21
						-1  0.00  0.00
						 0  0.00  0.00
						 1  0.00  0.00
						 3  0.00  0.21
						 5  0.00  0.00
					</tableData>
				</table>
			</product>
		</function>

		<function name="aero/moment/Yaw_door">
			<description>Yaw moment due to main door</description>
			<product>
				<property>aero/qbar-psf</property>
				<property>metrics/Sw-sqft</property>
				<property>metrics/bw-ft</property>
				<table>
					<independentVar lookup="row">extra/door-main-norm</independentVar>
					<tableData> <!-- To cancel out the slight offset from 0 due to the lag_filter -->
						0.00  0.00
						0.04  0.00
						1.00  0.05
					</tableData>
				</table>
			</product>
		</function>

	</axis>

</aerodynamics>
